jbname = 'PLET%A%x%B%-L%L%'

/MKDIR,'results\PLET%A%x%B%\L%L%'

FINISH
/FILNAME,jbname,1
/PREP7

K,,a/2,0,-b/2
K,,a/2,0,b/2
K,,-a/2,0,b/2
K,,-a/2,0,-b/2

K,,a/2,L,-b/2
K,,a/2,L,b/2
K,,-a/2,L,b/2
K,,-a/2,L,-b/2


V,1,2,3,4,5,6,7,8
